// SBML level 3 version 2

function conc(q, vol)
  piecewise(q/vol, vol > 1e-5, 0);
end

function metab_MM(Vmax, Km, PC, q, vol)
  vol*Vmax*conc(q, vol)/(PC*Km + conc(q, vol));
end

function metab_MA(CLH, PC, q, vol)
  CLH*conc(q, vol)/PC;
end

model euromix()
  // mamo:MAMO_0000203 mamo:MAMO_0000046
  // hasTaxon taxonomy:40674
  // model units - substance: MilliMOL, time: SEC, volume: L

  // Compartments:
  compartment Air = 1 L; Air is "alveolar air";
  compartment Urine = 1 L; Urine is "urine";  // UBERON:0001088
  compartment Fat; Fat has L; Fat is "adipose tissue";  // UBERON:0001013
  compartment Rich; Rich has L; Rich is "richly perfused tissue";  // UBERON:0013756
  compartment Liver; Liver has L; Liver is "liver";  // UBERON:0002107
  compartment Art; Art has L; Art is "arterial blood";  // UBERON:0013755
  compartment Ven; Ven has L; Ven is "venous blood";  // UBERON:0013756
  compartment Skin_e; Skin_e has L; Skin_e is "viable epidermis exposed skin";  // UBERON:0002097
  compartment Skin_u; Skin_u has L; Skin_u is "viable epidermis unexposed skin";  // UBERON:0002097
  compartment Skin_sc_e; Skin_sc_e has L; Skin_sc_e is "stratum corneum exposed skin";  // UBERON:0002027
  compartment Skin_sc_u; Skin_sc_u has L; Skin_sc_u is "stratum corneum unexposed skin";  // UBERON:0002027
  compartment Poor; Poor has L; Poor is "poorly perfused tissue";
  compartment Gut = 1 L; Gut is "gut";  // UBERON:0001555

  // Species:
  substanceOnly species QFat in Fat = 0; QFat is "quantity in fat tissues";  // SBO:0000247
  substanceOnly species QRich in Rich = 0; QRich is "quantity in richly tissues";  // SBO:0000247
  substanceOnly species QPoor in Poor = 0; QPoor is "quantity in poor tissues";  // SBO:0000247
  substanceOnly species QLiver in Liver = 0; QLiver is "quantity in liver";  // SBO:0000247
  substanceOnly species QMetab in Liver = 0; QMetab is "quantity metabolized (cumulated)";  // CHEBI:25212
  substanceOnly species QGut in Gut = 0; QGut is "quantity in gut lumen";  // SBO:0000247
  substanceOnly species QSkin_u in Skin_u = 0; QSkin_u is "quantity in viable skin (unexposed)";  // SBO:0000247
  substanceOnly species QSkin_e in Skin_e = 0; QSkin_e is "quantity in viable skin (exposed)";  // SBO:0000247
  substanceOnly species QSkin_sc_u in Skin_sc_u = 0; QSkin_sc_u is "quantity in skin stratum corneum (unexposed)";  // SBO:0000247
  substanceOnly species QSkin_sc_e in Skin_sc_e = 0; QSkin_sc_e is "quantity in skin stratum corneum (exposed)";  // SBO:0000247
  substanceOnly species QArt in Art = 0; QArt is "quantity in arterial blood";  // SBO:0000247
  substanceOnly species QVen in Ven = 0; QVen is "quantity in venous blood";  // SBO:0000247
  substanceOnly species QExcret in Urine = 0; QExcret is "quantity excreted in urine (cumulated)";  // SBO:0000247
  substanceOnly species QAir in Air = 0; QAir is "quantity in air";  // SBO:0000247

  // Parameters:
  BM = 70 KiloGM; BM is "body mass";
  BSA = 190 DeciM2; BSA is "body surface area";
  Height_sc = 0.0001 DeciM; Height_sc is "thickness stratum corneum";
  Height_vs = 0.0122 DeciM; Height_vs is "thickness viable epidermis";
  scVFat = 0.209 UNITLESS; scVFat is "fat as fraction of total body volume";
  scVRich = 0.105 UNITLESS; scVRich is "richly perfused tissues as fraction of total body volume";
  scVLiver = 0.024 UNITLESS; scVLiver is "liver as fraction of total body volume";
  scVBlood = 0.068 UNITLESS; scVBlood is "blood as fraction of total body volume";
  scFBlood = 4.8 L_PER_KiloGM_HR; scFBlood is "total blood flow per unit mass";
  scFFat = 0.085 UNITLESS; scFFat is "fat fraction of total blood flow going to compartments";
  scFPoor = 0.12 UNITLESS; scFPoor is "poorly perfused tissues fraction of total blood flow going to compartments";
  scFLiver = 0.27 UNITLESS; scFLiver is "liver fraction of total blood flow going to compartments";
  scFSkin = 0.05 UNITLESS; scFSkin is "skin fraction of total blood flow going to compartments";
  Falv = 2220 L_PER_HR; Falv is "alveolar ventilation rate";
  rho = 1 KiloGM_PER_L; rho is "tissue density";
  PCFat = 2.53 UNITLESS; PCFat is "partition coefficient fat over blood";
  PCLiver = 0.923 UNITLESS; PCLiver is "partition coefficient liver over blood";
  PCRich = 0.875 UNITLESS; PCRich is "partition coefficient poorly perfused tissue over blood";
  PCPoor = 0.647 UNITLESS; PCPoor is "partition coefficient richly perfused tissue over blood";
  PCSkin_sc = 0.889 UNITLESS; PCSkin_sc is "partition coefficient viable skin over stratum corneum";
  PCSkin = 0.889 UNITLESS; PCSkin is "partition coefficient viable skin over blood";
  PCAir = 1e99 UNITLESS; PCAir is "partition coefficient blood over air";
  Km = 0 MilliMOL; Km is "Michaelis constant";
  Michaelis = 0 UNITLESS; Michaelis is "flag for Michaelis-Menten or linear metabolism";
  Vmax = 0 MilliMOL_PER_L_HR; Vmax is "maximum rate of metabolism";
  fub = 0.51 UNITLESS; fub is "unbound fraction in blood";
  fSA_exposed = 0.1 UNITLESS; fSA_exposed is "fraction of skin surface area actually exposed";
  Kp_sc_vs = 0.01 DeciM_PER_HR; Kp_sc_vs is "diffusion rate from stratum corneum to viable skin";
  kGut = 1 PER_H; kGut is "oral absorption rate constant";
  CLH = 132 L_PER_HR; CLH is "hepatic clearance rate";
  Ke = 7.5 L_PER_HR; Ke is "renal excretion rate";
  f_su has L_PER_HR;
  f_se has L_PER_HR;
  VBlood has L; VBlood is "total blood volume";
  FBlood has L_PER_HR; FBlood is "blood flow";
  FFat has L_PER_HR; FFat is "blood flow to the fat";
  FPoor has L_PER_HR; FPoor is "blood flow to poorly perfused tissues";
  FLiver has L_PER_HR; FLiver is "blood flow to the liver";
  FSkin has L_PER_HR; FSkin is "blood flow to the skin";
  FRich has L_PER_HR; FRich is "blood flow to richly perfused tissues";
  FSkin_e has L_PER_HR; FSkin_e is "blood flow to exposed skin";
  FSkin_u has L_PER_HR; FSkin_u is "blood flow to unexposed skin";

  // Assignment rules:
  Fat := BM*scVFat/rho;
  Rich := BM*scVRich/rho;
  Liver := BM*scVLiver/rho;
  Art := VBlood/3;
  Ven := VBlood - Art;
  Skin_e := BSA*Height_vs*fSA_exposed;
  Skin_u := BSA*Height_vs*(1 - fSA_exposed);
  Skin_sc_e := BSA*Height_sc*fSA_exposed;
  Skin_sc_u := BSA*Height_sc*(1 - fSA_exposed);
  Poor := BM/rho - Fat - Rich - Liver - Skin_e - Skin_u - Skin_sc_e - Skin_sc_u - VBlood - 0.1*(BM/rho);
  f_su := Kp_sc_vs*BSA*(1 - fSA_exposed);
  f_se := Kp_sc_vs*BSA*fSA_exposed;
  VBlood := BM*scVBlood/rho;
  FBlood := scFBlood*BM;
  FFat := FBlood*scFFat;
  FPoor := FBlood*scFPoor;
  FLiver := FBlood*scFLiver;
  FSkin := FBlood*scFSkin;
  FRich := FBlood - FFat - FPoor - FLiver - FSkin;
  FSkin_e := FSkin*fSA_exposed;
  FSkin_u := FSkin - FSkin_e;

  // Reactions:
  _J0: QArt -> QFat; FFat*conc(QArt, Art);
  _J1: QFat -> QVen; FFat*conc(QFat, Fat)/PCFat;
  _J2: QArt -> QRich; FRich*conc(QArt, Art);
  _J3: QRich -> QVen; FRich*conc(QRich, Rich)/PCRich;
  _J4: QArt -> QPoor; FPoor*conc(QArt, Art);
  _J5: QPoor -> QVen; FPoor*conc(QPoor, Poor)/PCPoor;
  _J6: QArt -> QLiver; FLiver*conc(QArt, Art);
  _J7: QLiver -> QVen; FLiver*conc(QLiver, Liver)/PCLiver;
  _J8: QGut -> QLiver; kGut*QGut;
  _J9: QArt -> QSkin_u; FSkin_u*conc(QArt, Art);
  _J10: QSkin_u -> QVen; FSkin_u*conc(QSkin_u, Skin_u)/PCSkin;
  _J11: QSkin_u -> QSkin_sc_u; f_su*conc(QSkin_u, Skin_u)/PCSkin_sc;
  _J12: QSkin_sc_u -> QSkin_u; f_su*conc(QSkin_sc_u, Skin_sc_u);
  _J13: QArt -> QSkin_e; FSkin_e*conc(QArt, Art);
  _J14: QSkin_e -> QVen; FSkin_e*conc(QSkin_e, Skin_e)/PCSkin;
  _J15: QSkin_e -> QSkin_sc_e; f_se*conc(QSkin_e, Skin_e)/PCSkin_sc;
  _J16: QSkin_sc_e -> QSkin_e; f_se*conc(QSkin_sc_e, Skin_sc_e);
  _J17: QVen -> QArt; FBlood*conc(QVen, Ven);
  _J18: QLiver -> QMetab; fub*piecewise(metab_MM(Vmax, Km, PCLiver, QLiver, Liver), Michaelis > 0.5, metab_MA(CLH, PCLiver, QLiver, Liver));
  _J19: QArt -> QExcret; Ke*fub*conc(QArt, Art);
  _J20: QArt -> QAir; Falv*conc(QArt, Art)/PCAir;
  _J21: QAir -> QArt; FBlood*conc(QAir, Air);

  // Unit definitions:
  unit MilliMOL = 1e-3 mole;
  unit SEC = second;
  unit L = litre;
  unit KiloGM = 1000 gram;
  unit DeciM2 = (0.1 metre)^2;
  unit DeciM = 0.1 metre;
  unit UNITLESS = dimensionless;
  unit L_PER_KiloGM_HR = litre / (36000 second * 1000 gram);
  unit L_PER_HR = litre / (36000 second);
  unit KiloGM_PER_L = 1000 gram / litre;
  unit MilliMOL_PER_L_HR = 1e-3 mole / (36000 second * 1000 litre);
  unit DeciM_PER_HR = 0.1 metre / (36000 second);
  unit PER_H = 1 / (36000 second);
end
