// SBML level 3 version 2

model euromix()

  // Compartments:
  compartment default_compartment = 1;
  compartment Fat = VFat;
  compartment Rich = VRich;
  compartment pp = VPoor;
  compartment liver = VLiver;
  compartment gut = 1;
  compartment su = VSkin_u;
  compartment se = VSkin_e;
  compartment scu = VSkin_sc_u;
  compartment sce = VSkin_sc_e;
  compartment Art = VArt;
  compartment Ven = VVen;

  // Species:
  substanceOnly species QFat in Fat = 0;
  substanceOnly species QRich in Rich = 0;
  substanceOnly species QPoor in pp = 0;
  substanceOnly species QLiver in liver = 0;
  substanceOnly species QMetab in liver = 0;
  substanceOnly species QGut in gut = 0;
  substanceOnly species QSkin_u in su = 0;
  substanceOnly species QSkin_e in se = 0;
  substanceOnly species QSkin_sc_u in scu = 0;
  substanceOnly species QSkin_sc_e in sce = 0;
  substanceOnly species QArt in Art = 0;
  substanceOnly species QVen in Ven = 0;
  substanceOnly species QExcret in default_compartment = 0;
  species QAir in default_compartment = 0;

  // Parameters:
  BM = 70;
  BSA = 190;
  Height_sc = 0.0001;
  Height_vs = 0.0122;
  scVFat = 0.209;
  scVRich = 0.105;
  scVLiver = 0.024;
  scVBlood = 0.068;
  VFat = BM*scVFat;
  VRich = BM*scVRich;
  VLiver = BM*scVLiver;
  VBlood = BM*scVBlood;
  VArt = VBlood/3;
  VVen = VBlood - VArt;
  VSkin_e = BSA*Height_vs*fSA_exposed;
  fSA_exposed = 1;
  VSkin_u = 1;
  VSkin_sc_u = 1;
  VSkin_sc_e = BSA*Height_sc*fSA_exposed;
  VPoor = BM - VFat - VRich - VLiver - VSkin_e - VSkin_u - VSkin_sc_e - VSkin_sc_u - VBlood - 0.1*BM;
  scFBlood = 4.8;
  scFFat = 0.085;
  scFPoor = 0.12;
  scFLiver = 0.27;
  scFSkin = 0.05;
  FBlood = scFBlood*BM;
  FFat = FBlood*scFFat;
  FPoor = FBlood*scFPoor;
  FLiver = FBlood*scFLiver;
  FSkin = FBlood*scFSkin;
  FRich = FBlood - FFat - FPoor - FLiver - FSkin;
  FSkin_e = FSkin*fSA_exposed;
  FSkin_u = FSkin - FSkin_e;
  Falv = 2220;
  PCFat = 2.53;
  PCLiver = 0.923;
  PCRich = 0.875;
  PCPoor = 0.647;
  PCSkin_sc = 0.889;
  PCSkin = 0.889;
  PCAir = 1e99;
  Km = 0;
  Michaelis = 0;
  Vmax = 0;
  fub = 0.51;
  Kp_sc_vs = 0.01;
  kGut = 1;
  CLH = 132;
  Ke = 7.5;
  Frac = 1;
  Cinh = 0;
  Tinh = 0;
  OralDose = 0;
  DermalDose = 0;
  oral_dose = 0;
  t_oral_dose_1 = 0;
  t_oral_dose_2 = 1;

  // Reactions:
  _J0: QArt -> QFat; FFat*(QArt/Art);
  _J1: QFat -> QVen; FFat*(QFat/Fat)/PCFat;
  _J2: QArt -> QRich; FRich*(QArt/Art);
  _J3: QRich -> QVen; FRich*(QRich/Rich)/PCRich;
  _J4: QArt -> QPoor; FPoor*(QArt/Art);
  _J5: QPoor -> QVen; FPoor*(QPoor/pp)/PCPoor;
  _J6: QArt -> QLiver; FLiver*(QArt/Art);
  _J7: QLiver -> QVen; FLiver*(QLiver/liver)/PCLiver;
  _J8: QGut -> QLiver; kGut*QGut;
  _J9: QArt -> QSkin_u; FSkin_u*(QArt/Art);
  _J10: QSkin_u -> QVen; FSkin_u*(QSkin_u/su)/PCSkin;
  _J11: QSkin_u -> QSkin_sc_u; Kp_sc_vs*BSA*(1 - fSA_exposed)*(QSkin_u/su)/PCSkin_sc;
  _J12: QSkin_sc_u -> QSkin_u; Kp_sc_vs*BSA*(1 - fSA_exposed)*(QSkin_sc_u/scu);
  _J13: QArt -> QSkin_e; FSkin_e*(QArt/Art);
  _J14: QSkin_e -> QVen; FSkin_e*(QSkin_e/se)/PCSkin;
  _J15: QSkin_e -> QSkin_sc_e; Kp_sc_vs*BSA*fSA_exposed*(QSkin_e/se)/PCSkin_sc;
  _J16: QSkin_sc_e -> QSkin_e; Kp_sc_vs*BSA*fSA_exposed*(QSkin_sc_e/sce);
  _J17: QVen -> QArt; FBlood*(QVen/Ven);
  _J18: QLiver -> QMetab; fub*CLH*(QLiver/liver)/PCLiver;
  _J19: QArt -> QAir; Falv*(QArt/Art)/PCAir;
  _J20: QArt -> QExcret; Ke*fub*(QArt/Art);

  // Events:
  _E0: at (time >= t_oral_dose_2): QGut = QGut + oral_dose*Frac;
end
