// SBML level 3 version 2

function conc(q, vol)
  piecewise(q/vol, vol > 1e-5, 0);
end

model euromix()

  // Compartments:
  compartment default_compartment = 1;
  compartment Fat = VFat;
  compartment Rich = VRich;
  compartment pp = VPoor;
  compartment liver = VLiver;
  compartment gut = 1;
  compartment su = VSkin_u;
  compartment se = VSkin_e;
  compartment scu = VSkin_sc_u;
  compartment sce = VSkin_sc_e;
  compartment Art = VArt;
  compartment Ven = VVen;

  // Species:
  substanceOnly species QFat in Fat = 0;
  substanceOnly species QRich in Rich = 0;
  substanceOnly species QPoor in pp = 0;
  substanceOnly species QLiver in liver = 0;
  substanceOnly species QMetab in liver = 0;
  substanceOnly species QGut in gut = 0;
  substanceOnly species QSkin_u in su = 0;
  substanceOnly species QSkin_e in se = 0;
  substanceOnly species QSkin_sc_u in scu = 0;
  substanceOnly species QSkin_sc_e in sce = 0;
  substanceOnly species QArt in Art = 0;
  substanceOnly species QVen in Ven = 0;
  substanceOnly species QExcret in default_compartment = 0;
  species QAir in default_compartment = 0;

  // Parameters:
  BM = 70;
  BSA = 190;
  Height_sc = 0.0001;
  Height_vs = 0.0122;
  scVFat = 0.209;
  scVRich = 0.105;
  scVLiver = 0.024;
  scVBlood = 0.068;
  VFat = BM*scVFat;
  VRich = BM*scVRich;
  VLiver = BM*scVLiver;
  VBlood = BM*scVBlood;
  VArt = VBlood/3;
  VVen = VBlood - VArt;
  VSkin_e = BSA*Height_vs*fSA_exposed;
  fSA_exposed = 1;
  VSkin_u = BSA*Height_vs*(1 - fSA_exposed);
  VSkin_sc_e = BSA*Height_sc*fSA_exposed;
  VSkin_sc_u = BSA*Height_sc*(1 - fSA_exposed);
  VPoor = BM - VFat - VRich - VLiver - VSkin_e - VSkin_u - VSkin_sc_e - VSkin_sc_u - VBlood - 0.1*BM;
  scFBlood = 4.8;
  scFFat = 0;
  scFPoor = 0;
  scFLiver = 1;
  scFSkin = 0;
  FBlood = scFBlood*BM;
  FFat = FBlood*scFFat;
  FPoor = FBlood*scFPoor;
  FLiver = FBlood*scFLiver;
  FSkin = FBlood*scFSkin;
  FRich = FBlood - FFat - FPoor - FLiver - FSkin;
  FSkin_e = FSkin*fSA_exposed;
  FSkin_u = FSkin - FSkin_e;
  Falv = 2220;
  PCFat = 2.53;
  PCLiver = 0.923;
  PCRich = 0.875;
  PCPoor = 0.647;
  PCSkin_sc = 0.889;
  PCSkin = 0.889;
  PCAir = 1e99;
  Km = 0;
  Michaelis = 0;
  Vmax = 0;
  fub = 0.51;
  Kp_sc_vs = 0.01;
  kGut = 1;
  CLH = 132;
  Ke = 7.5;
  Frac = 1;
  Cinh = 0;
  Tinh = 0;
  OralDose = 0;
  DermalDose = 0;
  oral_dose = 0;
  t_oral_dose_1 = 0;
  t_oral_dose_2 = 1;

  // Reactions:
  _J0: QArt -> QLiver; FLiver*(QArt/Art);
  _J1: QLiver -> QVen; FLiver*(QLiver/liver)/PCLiver;
  _J2: QGut -> QLiver; kGut*QGut;
  _J3: QVen -> QArt; FBlood*(QVen/Ven);
  _J4: QLiver -> QMetab; fub*CLH*(QLiver/liver)/PCLiver;
  _J5: QArt -> QAir; Falv*(QArt/Art)/PCAir;
  _J6: QArt -> QExcret; Ke*fub*(QArt/Art);

  // Events:
  _E0: at (time >= t_oral_dose_2): QGut = QGut + oral_dose*Frac;
end
